// COMSOL Multiphysics 5.6.0.280 model "LT_500kV-non-ssup.mph"
// Outline of the model tree

Geometry
  geom1 "Geometry 1" (2D, length unit m)
    r1: Rectangle | pos = {-40, -60}; size = {80, 120}
    c1: Circle | pos = {-7.571, 37.771}; r = 0.0293
    c2: Circle | pos = {-7.571, 27.771}; r = 0.0293
    c3: Circle | pos = {-7.571, 17.771}; r = 0.0293
    c4: Circle | pos = {8.029, 17.771}; r = 0.0293
    c5: Circle | pos = {8.029, 27.771}; r = 0.0293
    c6: Circle | pos = {8.029, 37.771}; r = 0.0293
    c7: Circle | pos = {-8.029, 37.771}; r = 0.0293
    c8: Circle | pos = {-8.029, 38.229}; r = 0.0293
    c9: Circle | pos = {-7.571, 38.229}; r = 0.0293
    c10: Circle | pos = {-8.029, 27.771}; r = 0.0293
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    fin: Finalize "Form Union"

Materials
  mat1: Common "Aluminum" on domains 2-27
    def "Basic"
      relpermeability = 1
      heatcapacity = 900[J/(kg*K)]
      thermalconductivity = 238[W/(m*K)]
      electricconductivity = 3.774e7[S/m]
      relpermittivity = 1
      thermalexpansioncoefficient = 23e-6[1/K]
      density = 2700[kg/m^3]
    Enu "Young's modulus and Poisson's ratio"
      youngsmodulus = 70e9[Pa]
      poissonsratio = 0.33
    Murnaghan
      l = -2.5e11[Pa]
      m = -3.3e11[Pa]
      n = -3.5e11[Pa]
    Lame "Lamé parameters"
      lambLame = 5.1e10[Pa]
      muLame = 2.6e10[Pa]
  mat2: Common "Graphite" on no domains
    def "Basic"
      relpermeability = 1
      electricconductivity = 3e3[S/m]
      heatcapacity = 710[J/(kg*K)]
      relpermittivity = 1
      emissivity = 1
      density = 1950[kg/m^3]
      thermalconductivity = 150[W/(m*K)]*(300[K]/T)
  mat3: Common "Air" on domains 1
    def "Basic"
      relpermeability = 1
      relpermittivity = 1
      dynamicviscosity = eta(T[1/K])[Pa*s]
      ratioofspecificheat = 1.4
      electricconductivity = 0[S/m]
      heatcapacity = Cp(T[1/K])[J/(kg*K)]
      density = rho(pA[1/Pa],T[1/K])[kg/m^3]
      thermalconductivity = k(T[1/K])[W/(m*K)]
      soundspeed = cs(T[1/K])[m/s]
      eta: Piecewise | arg = T; pieces = {200.0, 1600.0, -8.38278E-7+8.35717342E-8*T^1-7.69429583E-11*T^2+4.6437266E-14*T^3-1.06585607E-17*T^4}
      Cp: Piecewise | arg = T; pieces = {200.0, 1600.0, 1047.63657-0.372589265*T^1+9.45304214E-4*T^2-6.02409443E-7*T^3+1.2858961E-10*T^4}
      rho: Analytic | expr = pA*0.02897/8.314/T; args = {pA, T}; dermethod = manual; argders = {{pA, d(pA*0.02897/8.314/T,pA)}, {T, d(pA*0.02897/8.314/T,T)}}
      k: Piecewise | arg = T; pieces = {200.0, 1600.0, -0.00227583562+1.15480022E-4*T^1-7.90252856E-8*T^2+4.11702505E-11*T^3-7.43864331E-15*T^4}
      cs: Analytic | expr = sqrt(1.4*287*T); args = T; dermethod = manual; argders = {T, d(sqrt(1.4*287*T),T)}
    RefractiveIndex
      n = 1
      ki = 0

Physics
  es: Electrostatics on all domains
    dependent variable V
    ccn1: ChargeConservation (default)
    zc1: ZeroCharge (default)
    init1: init "Initial Values 1" (default)
    gnd1: Ground on boundaries 2, 5-8, 105-108
    term1: DomainTerminal "Fase A_1" on domains 7, 8, 13, 14 | TerminalType = Voltage; V0 = 428660
    term2: DomainTerminal "Fase B_1" on domains 5, 6, 11, 12 | TerminalType = Voltage; V0 = -214330
    term3: DomainTerminal "Fase C_1" on domains 3, 4, 9, 10 | TerminalType = Voltage; V0 = -214330; Q0 = 0
    term4: DomainTerminal "Fase A_2" on domains 15, 16, 21, 22 | TerminalType = Voltage; V0 = 428660
    term5: DomainTerminal "Fase B_2" on domains 17, 18, 23, 24 | TerminalType = Voltage; V0 = -214330
    term6: DomainTerminal "Fase C_2" on domains 19, 20, 25, 26 | TerminalType = Voltage; V0 = -214330

Mesh
  mesh1 "Mesh 1" (physics-controlled)

Studies
  std1 "Study 1"
    stat: Stationary

Solver configurations
  sol1 "Solution 1" (study std1)
    v1: Variables "Dependent Variables 1"
    s1: Stationary "Stationary Solver 1"
      dDef: Direct
      fc1: FullyCoupled | linsolver = dDef

Datasets
  dset1: Solution | solution = sol1
  cln1: CutLine2D "CondutorPerfil" | data = dset1; method = pointdir; pdpoint = {-8.029, 37.771}; pddir = {1, 1}

Plots
  pg1: PlotGroup2D "Electric Potential (es)" | data = dset1
    surf1: Surface (disabled) | expr = sqrt(es.Ex^2+es.Ey^2)
    con1: Contour (disabled) | expr = V
    line1: Line | data = cln1; expr = sqrt(es.Ex^2+es.Ey^2)
  pg2: PlotGroup1D "1D Plot Group 2" | data = cln1
    lngr1: LineGraph | data = cln1; expr = sqrt(es.Ex^2+es.Ey^2)